<?xml version="1.0"?>
<!--
    Rotax 582
    2 Takt 2 Zylinder
    48 kW / 65 PS
    580.7 ccm3
-->
<piston_engine name="Rotax582">
  <minmp unit="INHG">          2.1 </minmp>
  <maxmp unit="INHG">         30.0 </maxmp>
  <displacement unit="IN3"> 65.20 </displacement>
  <maxhp>65.00</maxhp>
  <cycles>2.0</cycles>
  <idlerpm>1600.0</idlerpm>
  <maxthrottle>1.0</maxthrottle>
  <minthrottle>0.2</minthrottle>
</piston_engine>
